solve block
    # guess values
    P0 := 0
    P10 := 0
    P1 := 0
    P11 := 0
    λ := 12
    P2 := 0
    P12 := 0
    P3 := 0
    P13 := 0
    μ := 3.5
    P4 := 0
    P14 := 0
    P5 := 0
    P15 := 0
    P6 := 0
    P16 := 0
    P7 := 0
    P17 := 0
    P8 := 0
    P18 := 0
    P9 := 0
    # constraints
    P0*λ == P3*μ
    P9*(λ + μ) == P8*λ + P12*μ
    P1*λ == P0*λ + P4*μ
    P10*(λ + μ) == P9*λ + P13*μ
    P2*λ == P1*λ + P5*μ
    P11*(λ + μ) == P10*λ + P14*μ
    P3*(λ + μ) == P2*λ + P6*μ
    P12*(λ + μ) == P11*λ + P15*μ
    P4*(λ + μ) == P3*λ + P7*μ
    P13*(λ + μ) == P12*λ + P16*μ
    P5*(λ + μ) == P4*λ + P8*μ
    P14*(λ + μ) == P13*λ + P17*μ
    P6*(λ + μ) == P5*λ + P9*μ
    P15*(λ + μ) == P14*λ + P18*μ
    P7*(λ + μ) == P6*λ + P10*μ
    P16*(λ + μ) == P15*λ
    P8*(λ + μ) == P7*λ + P11*μ
    P17*(λ + μ) == P16*λ
    P0 + P1 + P2 + P3 + P4 + P5 + P6 + P7 + P8 + P9 + P10 + P11 + P12 + P13 + P14 + P15 + P16 + P17 + P18 == 1
    # solver
    Find(P0, P1, P2, P3, P4, P5, P6, P7, P8, P9, P10, P11, P12, P13, P14, P15, P16, P17, P18) = [0.00934433; 0.019331; 0.0299805; 0.0320377; 0.0342399; 0.0365128; 0.0390908; 0.0417901; 0.0443059; 0.0479297; 0.0510448; 0.0529315; 0.0603539; 0.0617254; 0.0594001; 0.0858023; 0.0664276; 0.0514278; 0.176324]
end solve block
P0 := 0.009
P1 := 0.019
P2 := 0.03
P3 := 0.032
P4 := 0.034
P5 := 0.037
P6 := 0.039
P7 := 0.042
P8 := 0.044
P9 := 0.048
P10 := 0.051
P11 := 0.053
P12 := 0.06
P13 := 0.062
P14 := 0.059
P15 := 0.086
P16 := 0.066
P17 := 0.051
P18 := 0.176
λ := 12
μ := 3.5
Lo := 1*P4 + 2*P5 + 3*P6 + 4*P7 + 5*P8 + 6*P9 + 7*P10 + 8*P11 + 9*P12 + 10*P13 + 11*P14 + 12*P15 + 13*P16 + 14*P17 + 15*P18 = 8.735
Lc := P1 + 2*P2 + 3*P3 + 4*P4 + 5*P5 + 6*P6 + 7*P7 + 8*P8 + 9*P9 + 10*P10 + 11*P11 + 12*P12 + 13*P13 + 14*P14 + 15*P15 + 16*P16 + 17*P17 + 18*P18 = 11.634
Wo := Lo/λ = 0.727917
Wc := Lc/λ = 0.9695
